*Heading
** Job name: Job-1 Model name: Model-1
** Generated by: Abaqus/CAE 2023
*Preprint, echo=NO, model=NO, history=NO, contact=NO
**
** PARTS
**
*Part, name="Left Grip"
*Node
      1,   59.2386131,  -4.76410723,         100.
      2,   57.1578369,  -9.12389469,         100.
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*Element, type=S4R
   1,   60,    1,   61,  120
   2,    1,    2,   62,   61
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*Nset, nset=_PickedSet2, internal, generate
    1,  1320,     1
*Elset, elset=_PickedSet2, internal, generate
    1,  1260,     1
** Section: Section-2
*Shell Section, elset=_PickedSet2, material="ASTM 36A"
1., 5
*End Part
**
*Part, name="Oval Bar"
*Node
      1,   59.2386131,   4.76410723,           0.
      2,   54.1549683,   12.9154911,           0.
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*Element, type=C3D8R
    1,   423,   382,   381,   525,    61,    20,    19,   163
    2,   422,   477,   525,   381,    60,   115,   163,    19
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*Nset, nset=_PickedSet2, internal, generate
     1,  28236,      1
*Elset, elset=_PickedSet2, internal, generate
     1,  25487,      1
** Section: Section-1
*Solid Section, elset=_PickedSet2, material="ASTM 36A"
,
*End Part
**
*Part, name="Right Grip"
*Node
      1,   59.2386131,  -4.76410723,         100.
      2,   57.1578369,  -9.12389469,         100.
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*Element, type=S4R
   1,   60,    1,   61,  120
   2,    1,    2,   62,   61
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*Nset, nset=_PickedSet2, internal, generate
    1,  1320,     1
*Elset, elset=_PickedSet2, internal, generate
    1,  1260,     1
** Section: Section-2
*Shell Section, elset=_PickedSet2, material="ASTM 36A"
1., 5
*End Part
**
**
** ASSEMBLY
**
*Assembly, name=Assembly
**
*Instance, name="Left Grip-1", part="Left Grip"
*End Instance
**
*Instance, name="Oval Bar-1", part="Oval Bar"
*End Instance
**
*Instance, name="Right Grip-1", part="Right Grip"
          0.,           0.,         900.
*End Instance
**
*Node
      1,           0.,           0.,           0.
*Node
      2,           0.,           0.,        1000.
*Nset, nset=_PickedSet15, internal
 1,
*Nset, nset=_PickedSet17, internal
 2,
*Nset, nset=_PickedSet18, internal
 1,
*Nset, nset=_PickedSet19, internal, instance="Left Grip-1", generate
    1,  1320,     1
*Elset, elset=_PickedSet19, internal, instance="Left Grip-1", generate
    1,  1260,     1
*Nset, nset=_PickedSet20, internal
 2,
*Nset, nset=_PickedSet21, internal, instance="Right Grip-1", generate
    1,  1320,     1
*Elset, elset=_PickedSet21, internal, instance="Right Grip-1", generate
    1,  1260,     1
*Nset, nset=_PickedSet22, internal
 1, 2
*Nset, nset=_PickedSet23, internal
 1,
*Nset, nset=_PickedSet24, internal
 2,
*Elset, elset=__PickedSurf8_SNEG, internal, instance="Left Grip-1", generate
    1,  1260,     1
*Surface, type=ELEMENT, name=_PickedSurf8, internal
__PickedSurf8_SNEG, SNEG
*Elset, elset=__PickedSurf9_S4, internal, instance="Oval Bar-1"
     1,    13,    19,    29,    50,    52
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*Elset, elset=__PickedSurf9_S6, internal, instance="Oval Bar-1"
     2,    18,    35,    39,    41,    42
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*Elset, elset=__PickedSurf9_S3, internal, instance="Oval Bar-1"
     4,     5,     6,     8,    11,    17
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*Elset, elset=__PickedSurf9_S5, internal, instance="Oval Bar-1"
     9,    10,    15,    20,    30,    62
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*Surface, type=ELEMENT, name=_PickedSurf9, internal
__PickedSurf9_S4, S4
__PickedSurf9_S6, S6
__PickedSurf9_S3, S3
__PickedSurf9_S5, S5
*Elset, elset=__PickedSurf10_SNEG, internal, instance="Right Grip-1", generate
    1,  1260,     1
*Surface, type=ELEMENT, name=_PickedSurf10, internal
__PickedSurf10_SNEG, SNEG
*Elset, elset=__PickedSurf11_S4, internal, instance="Oval Bar-1"
     1,    13,    19,    29,    50,    52
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*Elset, elset=__PickedSurf11_S6, internal, instance="Oval Bar-1"
     2,    18,    35,    39,    41,    42
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*Elset, elset=__PickedSurf11_S3, internal, instance="Oval Bar-1"
     4,     5,     6,     8,    11,    17
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*Elset, elset=__PickedSurf11_S5, internal, instance="Oval Bar-1"
     9,    10,    15,    20,    30,    62
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*Surface, type=ELEMENT, name=_PickedSurf11, internal
__PickedSurf11_S4, S4
__PickedSurf11_S6, S6
__PickedSurf11_S3, S3
__PickedSurf11_S5, S5
*Elset, elset=__PickedSurf14_SPOS, internal, instance="Left Grip-1", generate
    1,  1260,     1
*Surface, type=ELEMENT, name=_PickedSurf14, internal
__PickedSurf14_SPOS, SPOS
*Elset, elset=__PickedSurf16_SPOS, internal, instance="Right Grip-1", generate
    1,  1260,     1
*Surface, type=ELEMENT, name=_PickedSurf16, internal
__PickedSurf16_SPOS, SPOS
** Constraint: Constraint-1
*Tie, name=Constraint-1, adjust=yes
_PickedSurf9, _PickedSurf8
** Constraint: Constraint-2
*Tie, name=Constraint-2, adjust=yes
_PickedSurf11, _PickedSurf10
** Constraint: Constraint-3
*Coupling, constraint name=Constraint-3, ref node=_PickedSet15, surface=_PickedSurf14
*Kinematic
** Constraint: Constraint-4
*Coupling, constraint name=Constraint-4, ref node=_PickedSet17, surface=_PickedSurf16
*Kinematic
** Constraint: Constraint-5
*Rigid Body, ref node=_PickedSet18, elset=_PickedSet19
** Constraint: Constraint-6
*Rigid Body, ref node=_PickedSet20, elset=_PickedSet21
*End Assembly
**
** MATERIALS
**
*Material, name="ASTM 36A"
*Elastic
 2.1e+11, 0.3
** ----------------------------------------------------------------
**
** STEP: Step-1
**
*Step, name=Step-1, nlgeom=NO
*Static
1., 1., 1e-05, 1.
**
** BOUNDARY CONDITIONS
**
** Name: BC-1 Type: Displacement/Rotation
*Boundary
_PickedSet22, 1, 1
_PickedSet22, 2, 2
_PickedSet22, 3, 3
_PickedSet22, 4, 4
_PickedSet22, 5, 5
** Name: BC-2 Type: Displacement/Rotation
*Boundary
_PickedSet23, 6, 6, 10.
** Name: BC-3 Type: Displacement/Rotation
*Boundary
_PickedSet24, 6, 6, -10.
**
** OUTPUT REQUESTS
**
*Restart, write, frequency=0
**
** FIELD OUTPUT: F-Output-1
**
*Output, field, variable=PRESELECT
**
** HISTORY OUTPUT: H-Output-1
**
*Output, history, variable=PRESELECT
*End Step
